Vin := 17.5 V
Vinmax := 18 V
Vout := 3.3 V
Ioutmax := 4 A
Ioutmin := 100 mA
f := 100 kHz
ΔVout := 20 mV
Vrp := 374 mV
Vtmax := 18 V
Vech := ΔVout + Vrp + Vout = 3.694 V
# Duty min/max
δmin := Vout/Vin = 0.188571
δmax := Vout/Vinmax = 0.183333
# Diode:
Vdmax := 18 V
Idmax := 4.11 A
Lmin := Vout/(2*Ioutmin*f)*(1 - Vech/Vinmax) = 0.000131138 H
Itmax := Ioutmax + Vech/(2*Lmin*f)*(1 - Vech/Vinmax) = 4.11194 A
C := 1/8*(1 - Vech/Vin)*Vin/(Lmin*ΔVout*f^2) = 6.57988e-5 F
Pd := Vinmax*Itmax = 74.0149 W
